// COMSOL Multiphysics 6.0.0.405 model "test3_SpheroidNozzleSimple3D.mph"
// Outline of the model tree

Parameters
  top = 2100[µm]
  nzlr = 120[µm]
  nzlh = 700[µm]
  sphr = 350[µm]
  uo = 100[µm/s]
  to = 0.01[s]

Selections
  sel1: Explicit "Top" on boundaries 7
  sel2: Explicit "Internal Wall" on boundaries 10-25
  sel3: Explicit "Bottom" on boundaries 3
  sel4: Explicit "Side walls" on boundaries 1, 2, 4, 5, 8, 9, 26, 27

Geometry
  geom1 "Geometry 1" (3D, length unit µm)
    wp1: WorkPlane | quickplane = yz; unite = on
      r1: Rectangle | pos = {0, top-nzlr*2}; size = {nzlr, nzlr*2}
      c1: Circle | pos = {0, top-2*nzlr-0.9*sphr}; rot = -90; r = sphr; angle = 180
      uni1: Union | input = c1, r1; intbnd = off; edge = all
    rev1: Revolve | workplane = wp1; input = wp1; angtype = full
    blk1: Block | pos = {-2*sphr, -2*sphr, 0}; size = {4*sphr, 4*sphr, top}
    dif1: Difference | input = blk1; input2 = rev1
    wp2: WorkPlane | quickz = top-200; unite = on
    par1: Partition "Partition Objects 1" | input = dif1; partitionwith = workplane; workplane = wp2
    fin: Finalize "Form Union"

Materials
  mat1: Common "Air" on domains 2
    def "Basic"
      thermalexpansioncoefficient = alpha_p(pA,T)
      molarmass = 0.02897[kg/mol]
      bulkviscosity = muB(T)
      relpermeability = 1
      relpermittivity = 1
      dynamicviscosity = eta(T)
      ratioofspecificheat = 1.4
      electricconductivity = 0[S/m]
      heatcapacity = Cp(T)
      density = rho(pA,T)
      thermalconductivity = k(T)
      soundspeed = cs(T)
      eta: Piecewise | arg = T; pieces = {200.0, 1600.0, -8.38278E-7+8.35717342E-8*T^1-7.69429583E-11*T^2+4.6437266E-14*T^3-1.06585607E-17*T^4}; argunit = K; fununit = Pa*s
      Cp: Piecewise | arg = T; pieces = {200.0, 1600.0, 1047.63657-0.372589265*T^1+9.45304214E-4*T^2-6.02409443E-7*T^3+1.2858961E-10*T^4}; argunit = K; fununit = J/(kg*K)
      rho: Analytic | expr = pA*0.02897/R_const[K*mol/J]/T; args = {pA, T}; fununit = kg/m^3; argunit = {Pa, K}
      k: Piecewise | arg = T; pieces = {200.0, 1600.0, -0.00227583562+1.15480022E-4*T^1-7.90252856E-8*T^2+4.11702505E-11*T^3-7.43864331E-15*T^4}; argunit = K; fununit = W/(m*K)
      cs: Analytic | expr = sqrt(1.4*R_const[K*mol/J]/0.02897*T); args = T; fununit = m/s; argunit = K
      an1: Analytic | funcname = alpha_p; expr = -1/rho(pA,T)*d(rho(pA,T),T); args = {pA, T}; fununit = 1/K; argunit = {Pa, K}
      an2: Analytic "Analytic 2a" | funcname = muB; expr = 0.6*eta(T); args = T; fununit = Pa*s; argunit = K
    RefractiveIndex
      n = 1
      ki = 0
    NonlinearModel
      BA = (def.gamma+1)/2
    idealGas
      Rs = R_const/Mn
      heatcapacity = Cp(T)
      ratioofspecificheat = 1.4
      molarmass = 0.02897
      Cp: Piecewise | arg = T; pieces = {200.0, 1600.0, 1047.63657-0.372589265*T^1+9.45304214E-4*T^2-6.02409443E-7*T^3+1.2858961E-10*T^4}; argunit = K; fununit = J/(kg*K)
  mat2: Common "Water, liquid" on domains 1
    def "Basic"
      thermalexpansioncoefficient = alpha_p(T)
      bulkviscosity = muB(T)
      dynamicviscosity = eta(T)
      ratioofspecificheat = gamma_w(T)
      electricconductivity = 5.5e-6[S/m]
      heatcapacity = Cp(T)
      density = rho(T)
      thermalconductivity = k(T)
      soundspeed = cs(T)
      eta: Piecewise
        arg = T
        pieces = 
          {273.15, 413.15, 1.3799566804-0.021224019151*T^1+1.3604562827E-4*T^2-4.6454090319E-7*T^3+8.9042735735E-10*T^4-9.0790692686E-13*T^5+3.8457331488E-16*T^6}
          {413.15, 553.75, 0.00401235783-2.10746715E-5*T^1+3.85772275E-8*T^2-2.39730284E-11*T^3}
        argunit = K
        fununit = Pa*s
      Cp: Piecewise | arg = T; pieces = {273.15, 553.75, 12010.1471-80.4072879*T^1+0.309866854*T^2-5.38186884E-4*T^3+3.62536437E-7*T^4}; argunit = K; fununit = J/(kg*K)
      rho: Piecewise
        arg = T
        smooth = contd1
        pieces = 
          {273.15, 293.15, 6.3092789034e-05*T^3-0.0603676398829*T^2+18.9229382407066*T-950.704055329848}
          {293.15, 373.15, 1.0335053319e-05*T^3-0.0133950656345*T^2+4.96928883266*T+432.257114008512}
        argunit = K
        fununit = kg/m^3
      k: Piecewise | arg = T; pieces = {273.15, 553.75, -0.869083936+0.00894880345*T^1-1.58366345E-5*T^2+7.97543259E-9*T^3}; argunit = K; fununit = W/(m*K)
      cs: Interpolation | table = {{273, 1403}, {278, 1427}, {283, 1447}, {293, 1481}, {303, 1507}, {313, 1526}, {323, 1541}, {333, 1552}, {343, 1555}, {353, 1555}, {363, 1550}, {373, 1543}}; interp = piecewisecubic; fununit = m/s; argunit = K
      an1: Analytic | funcname = alpha_p; expr = -1/rho(T)*d(rho(T),T); args = T; fununit = 1/K; argunit = K
      an2: Analytic | funcname = gamma_w; expr = 1+(T/Cp(T))*(alpha_p(T)*cs(T))^2; args = T; fununit = 1; argunit = K
      an3: Analytic | funcname = muB; expr = 2.79*eta(T); args = T; fununit = Pa*s; argunit = K

Physics
  spf: LaminarFlow "Creeping Flow" on all domains
    dependent variable u = {u, v, w}
    PhysicalModelProperty.StokesFlowProp = 1
    PhysicalModelProperty.IncludeGravity = 1
    fp1: FluidProperties (default)
    init1: init "Initial Values 1" (default) | u_init = {0, 0, -uo}
    wallbc1: WallBC "Wall 1" (default)
    grav1: Gravity
    open1: OpenBoundary on selection sel1
    wallbc2: WallBC "Wall 2" on selection sel2 | TranslationalVelocityOption = ZeroFixedWall
    out1: OutletBoundary "Outlet 1" on boundaries 1-5, 8, 9, 26, 27
      BoundaryCondition = Velocity
      ComponentWise = VelocityFieldComponentWise
      u0 = {0, 0, -uo}
  pf: PhaseField on all domains
    dependent variable phipf
    pfm1: PhaseFieldModel (default) | epsilon_pf = 75e-6; chi = 1000000
    init1: init "Initial Values 1" (default)
    initfluid2: initFluid2 "Initial Values, Fluid 2" on domains 1
    ww1: WettedWall (default)
    inl1: InletBoundary "Inlet 1" on selection sel1
    inl2: InletBoundary "Inlet 2" on selection sel3 | pfcond = Fluid2pf
    ww2: WettedWall on selection sel2 | thetaw = pi/3
    ww3: WettedWall on selection sel4

Multiphysics
  tpf1: TwoPhaseFlowPhaseField on all domains
    Fluid1 = mat1
    Fluid2 = mat2
    IncludeSurfaceTensionGradientEffect = 1
    Fluid_physics = spf
    Mathematics_physics = pf

Mesh
  mesh1 "Mesh 1"
    size: MeshSizeDefault | hmax = 500; hmin = 400; custom = on
    ftet1: FreeTet "Free Tetrahedral 1" on remaining entities
      size1: Size on entire geometry | hmax = 75; hmin = 75; custom = on

Studies
  std1 "Study 1"
    phasei: PhaseInitialization | solve for = {pf}
    time: Transient "Time Dependent" | tlist = range(0,0.5,10); useinitsol = on; initstudy = std1

Solver configurations
  sol1 "Solution 1" (study std1)
    v1: Variables "Dependent Variables 1"
    s1: Stationary "Stationary Solver 1"
      fc1: FullyCoupled | linsolver = i1; initstep = 0.01; minstep = 1.0E-6; maxiter = 50
      i1: Iterative "AMG, interface distance (pf)" | nlinnormuse = on; maxlinit = 1000
        mg1: Multigrid | prefun = saamg; maxcoarsedof = 50000; saamgcompwise = on
    su1: StoreSolution "Solution Store 1"
    v2: Variables "Dependent Variables 2" | resscalemethod = manual; notsolmethod = sol
      comp1_phipf: Field "Phase field variable (comp1.phipf)" | scalemethod = manual; scaleval = 1
    t1: Time "Time-Dependent Solver 1"
      tlist = range(0,0.5,10)
      rtol = 0.005
      atolglobalfactor = 0.05
      atolmethod = {comp1_GI, global, comp1_p, scaled, comp1_phipf, global, comp1_psi, global, comp1_u, global}
      atolfactor = {comp1_GI, 0.1, comp1_p, 1, comp1_phipf, 0.1, comp1_psi, 0.1, comp1_u, 0.1}
      maxorder = 2
      stabcntrl = on
      bwinitstepfrac = 0.01
      estrat = exclude
      rescaleafterinitbw = on
      se1: Segregated | ntolfact = 0.5; segstabacc = segaacc; segaaccdim = 5; segaaccmix = 0.9; segaaccdelay = 1
        ss1: SegregatedStep "Velocity u, Pressure p" | segvar = {comp1_u, comp1_p}; linsolver = i1; subdamp = 0.8
        ss2: SegregatedStep "Phase field variables" | linsolver = i2; subdamp = 0.8
      i1: Iterative "AMG, fluid flow variables (spf)" | maxlinit = 100; rhob = 20
        mg1: Multigrid | prefun = saamg; iter = 1; maxcoarsedof = 80000; strconn = 0.02; saamgcompwise = on
      i2: Iterative "AMG, phase field variables (pf)" | maxlinit = 50; rhob = 20
        mg1: Multigrid | prefun = saamg; iter = 1; maxcoarsedof = 50000
  sol2 "Solution Store 1" (study std1)
  sol3 "Refined Mesh Solution 1" (study std1)

Datasets
  dset1: Solution | solution = sol1
  dset2: Solution | solution = sol2
  dset3: Solution | solution = sol3
  surf1: Surface "Exterior Walls" on boundaries 10-25 | data = dset3

Plots
  pg1: PlotGroup3D "Velocity (spf)" | data = dset1
    slc1: Slice | expr = spf.U
  pg2: PlotGroup3D "3D Plot Group 2" | data = dset1
    slc1: Slice | expr = pf.Vf1
    iso1: Isosurface | expr = phipf; levelmethod = levels
  pg4: PlotGroup3D "Pressure (spf)" | data = surf1
    surf1: Surface | expr = 1
    con1: Contour "Pressure" | expr = p; levelrounding = off
  pg5: PlotGroup3D "Volume Fraction of Fluid 1 (pf)" | data = dset1
    slc1: Slice | expr = round(pf.Vf1); quickxnumber = 1
    iso1: Isosurface | expr = pf.Vf1; levelmethod = levels; levels = 0.5
    vol1: Volume | expr = pf.Vf1